# Enhedsdefinitioner
# Pandens egenskaber
l_haandtag := 20 cm
m_pande := 3 kg
r_pande := 14 cm
t_svingtid := 1 s
A_pande := r_pande^2*π = 0.0615752 m^2
# Inertimoment for skive, med rotationsakse gennem centrum
I_0pande := 1/4*m_pande*r_pande^2 = 0.0147 kg*m^2
# Steiners sætning til lineær forskydning af inertimoment
I_pande := I_0pande + m_pande*(r_pande + l_haandtag)^2 = 0.3615 kg*m^2
# Vinkelhastighed antagende bevægelsen er en halvcirkel
ω_gns := π/t_svingtid = 3.14159 1/s
# Maksimal vinkelhastighed antagende at der er konstant acceleration til konstant deccelation
ω_peak := ω_gns*2 = 6.28319 1/s
# Konstante acceleration
α_gns := ω_peak/(t_svingtid/2) = 12.5664 1/s^2
# Nødvendig omrejningsmoment for motoren
τ := I_pande*α_gns = 4.54274 N*m
